** NOT_RELEASED_FOR_NATIVE_EXECUTION; VERSION_SEMANTICS_PENDING
** R1 PDMS depth split only; original labels preserved; new zero-state diagnostic
** ITOL01-PRO-PDMS-DEPTH2X-EXEC-20260930-01
*Heading
Intact flat ITO on PDMS method transfer, mm-N-s
*Preprint, echo=NO, model=YES, history=NO, contact=NO
*Part, name=STRIP
*Node
1, 0, -0.0050000000000000001
2, 3.9062500000000001e-05, -0.0050000000000000001
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*Element, type=CPE4R, elset=ALL_ELEMS
1, 1, 2, 27191, 27190
2, 2, 3, 27192, 27191
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*Elset, elset=PDMS
1 , 26625 , 2 , 26626 , 3 , 26627 
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*Elset, elset=ITO
24577 , 24578 , 24579 , 24580 , 24581 , 24582 
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*Elset, elset=ITO_GAUGE
24679 , 24680 , 24681 , 24682 , 24683 , 24684 
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*Elset, elset=ITO_LEFT_END
24577 , 24578 , 24579 , 24580 , 24581 , 24582 
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*Elset, elset=ITO_RIGHT_END
24987 , 24988 , 24989 , 24990 , 24991 , 24992 
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*Nset, nset=LEFT
1 , 514 , 1027 , 1540 , 2053 , 2566 
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*Nset, nset=RIGHT
513 , 1026 , 1539 , 2052 , 2565 , 3078 
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*Nset, nset=ANCHOR
257
*Nset, nset=ALL_NODES, generate
1, 51813, 1
*Nset, nset=INTERFACE
24625 , 24626 , 24627 , 24628 , 24629 , 24630 
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*Solid Section, elset=PDMS, material=PDMS_METHOD_SEED, CONTROLS=R2_PDMS_DC_OFF
1.
*Solid Section, elset=ITO, material=ITO_BRITTLE_METHOD_SEED
1.
*End Part
*Assembly, name=ASSEMBLY
*Instance, name=STRIP-1, part=STRIP
*End Instance
*End Assembly
*Material, name=ITO_BRITTLE_METHOD_SEED
*Density
7.14e-9
*Elastic
103200., 0.27
*Brittle Cracking, type=GFI
265., 0.005
*Brittle Shear, type=POWER LAW
0.10, 1.0
*Brittle Failure, cracks=1
3.77358490566e-5
*Material, name=PDMS_METHOD_SEED
*Density
1.03e-9
*Hyperelastic, mooney-rivlin
0.27, 0.0108, 0.036
*Amplitude, name=RAMP, definition=SMOOTH STEP
0., 0., 5e-05, 1.
*SECTION CONTROLS, NAME=R2_PDMS_DC_OFF, DISTORTION CONTROL=NO
*Step, name=TENSION, nlgeom=YES
*Dynamic, Explicit
, 5e-05
*Boundary
STRIP-1.ANCHOR, 2, 2, 0.
*Boundary, amplitude=RAMP
STRIP-1.LEFT, 1, 1, -0.000200
STRIP-1.RIGHT, 1, 1, 0.000200
*Output, field, number interval=4000, time marks=NO
*Node Output, nset=STRIP-1.ALL_NODES
U, V
*Element Output, elset=STRIP-1.ALL_ELEMS
S, LE
*Element Output, elset=STRIP-1.ITO
CKE, CKLE, CKEMAG, CKLS, CKSTAT, STATUS
*Output, history, time interval=2.5e-09
*Node Output, nset=STRIP-1.LEFT
U1, RF1
*Node Output, nset=STRIP-1.RIGHT
U1, RF1
*Energy Output
ALLWK, ALLIE, ALLSE, ALLKE, ALLAE, ALLVD, ALLDMD, ALLDC, ETOTAL
*Energy Output, elset=STRIP-1.ITO
ALLIE, ALLSE, ALLKE, ALLAE, ALLVD, ALLDMD, ALLDC
*Energy Output, elset=STRIP-1.PDMS
ALLIE, ALLSE, ALLKE, ALLAE, ALLVD, ALLDMD, ALLDC
*End Step
